!!!master.dss
clear
new object=circuit.secondarytestcircuit


! redirect vsource.dss
! redirect feeder\branches.dss
! redirect feeder\transformers.dss
! redirect feeder\loads.dss
! makebuslist
! redirect busvoltagebases.dss ! set voltage bases
! buscoords buscoords.dss
! giscoords giscoords.dss


!!!loadshape.dss
new object=loadshape.default npts=24 interval=1 mult=[0.677,0.6256,0.6087,0.5833,0.58028,0.6025,0.657,0.7477,0.832,0.88,0.94,0.989,0.985,0.98,0.9898,0.999,1,0.958,0.936,0.913,0.876,0.876,0.828,0.756]
new object=loadshape.subvoltage npts=8739 minterval=60 pmult=[1.04655,1.0447,1.04647,1.04494,1.04799,1.04454,1.04318,1.04398,1.04077,1.03829,1.04061,1.03861,1.03885,1.03652,1.0354,1.03348,1.03203,1.03773,1.03765,1.03781,1.04342,1.04286,1.04775,1.04767] useactual=no
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new object=loadshape.load1_1 npts=8739 minterval=60 mult=[6.45982,6.36214,6.67634,5.30756,6.74313,4.07919,3.84796,3.21719,2.42537,2.55073,3.16526,4.86132,3.31705,3.98291,2.11262,2.49844,5.85619,5.00307,6.65768,5.88827,5.74679,5.43412,4.28193,5.93358] qmult=[2.95256,2.97289,1.33541,0.229592,3.22093,1.82894,1.80074,1.19494,1.1006,0.988819,1.3688,1.35547,1.44406,1.09878,0.960838,1.07329,1.78187,2.33849,2.31025,1.07228,1.11032,2.17574,1.52304,1.88286] useactual=yes
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new object=loadshape.load1_2 npts=8739 minterval=60 mult=[5.88557,4.64298,4.23638,4.68735,6.72375,6.29916,6.08988,4.72046,4.28864,4.22568,4.48046,5.89352,3.41238,4.9112,5.07288,6.13103,6.14053,5.45577,6.92784,4.547,4.22859,4.30053,6.29768,6.68705] qmult=[2.76224,0.835834,1.64395,1.02927,1.53927,2.43455,2.30164,1.83529,1.9255,1.23316,1.18496,0.461725,0.328945,2.12493,2.16104,2.27502,2.58322,1.42702,3.11164,2.0255,0.760051,1.34646,2.86019,1.83841] useactual=yes
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new object=loadshape.load1_3 npts=8739 minterval=60 mult=[5.36124,5.49347,5.31317,2.45163,1.56086,1.39129,1.35171,1.25682,1.26958,2.45666,3.94963,4.64504,2.379,1.35525,1.26427,1.34492,1.85865,2.87839,2.8458,2.89068,4.68732,4.05811,2.858,5.8716] qmult=[1.54823,2.61157,2.31454,0.156358,0.752503,0.521562,0.598255,0.45769,0.440552,0.70604,1.71853,1.20118,0.352936,0.327889,0.285995,0.238774,0.194562,1.16696,0.927746,0.718344,1.601,0.951696,0.830203,1.91265] useactual=yes
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new object=loadshape.load1_4 npts=8739 minterval=60 mult=[4.82414,3.93691,3.68899,2.83017,3.40688,3.5342,3.44726,3.33981,3.98215,4.11249,3.97899,4.11815,5.15005,3.82551,4.796,5.86775,3.53683,2.7339,2.10444,2.07301,2.03342,2.78979,6.05135,5.79076] qmult=[1.7416,1.83242,1.33743,1.03776,0.504588,1.44381,1.14121,0.994449,0.706455,0.535584,1.28778,1.12532,1.95945,1.57427,2.06654,0.744583,1.33802,0.423167,0.700529,0.884724,0.676485,0.510942,2.04215,2.06182] useactual=yes
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new object=loadshape.load1_5 npts=8739 minterval=60 mult=[4.82138,4.22458,3.9888,3.90636,2.54442,1.90761,3.745,2.80385,2.03849,1.74776,4.13775,2.90326,6.98584,4.48021,5.42152,4.75073,6.0363,6.69722,5.57985,5.93145,5.33424,5.2748,4.44769,5.29105] qmult=[1.52363,1.52887,1.12809,1.24727,1.1916,0.857077,1.24095,1.03207,0.574964,0.523405,1.25599,1.09031,2.90886,0.758758,1.07896,1.5746,1.12337,1.18932,2.51294,1.6212,1.04777,2.08889,1.65874,2.4751] useactual=yes
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new object=loadshape.load2 npts=8739 minterval=60 mult=[19.8216,29.5704,25.5138,22.4477,19.3581,12.8436,11.6232,14.1511,13.6138,13.765,13.6138,12.3477,12.5412,16.2758,12.1388,12.7646,12.1341,13.3814,12.6535,12.0021,12.5595,15.4052,25.9619,31.1304] qmult=[4.22812,8.45642,2.26998,6.74557,5.10932,5.00823,3.33808,5.25099,5.02708,5.66757,6.41042,4.86441,2.52072,5.97565,3.87049,3.26113,5.48911,1.87167,3.76901,3.36587,4.6098,5.33048,12.112,14.3988] useactual=yes
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new object=loadshape.load3_1 npts=8739 minterval=60 mult=[6.73014,3.75842,1.69769,1.59897,1.6502,1.46574,1.7757,1.49389,1.95703,3.43707,4.58605,4.14654,3.76531,5.15144,4.45833,3.62237,3.67835,3.51187,3.42621,6.69547,2.98992,4.51409,4.89579,3.77976] qmult=[2.5862,1.47532,0.515826,0.095695,0.524047,0.450399,0.549184,0.215796,0.494578,1.06729,0.798531,1.71607,0.796756,2.04178,1.81985,1.67859,1.27189,1.2999,1.48835,0.324867,0.806894,1.70566,1.40959,0.624463] useactual=yes
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new object=loadshape.load3_2 npts=8739 minterval=60 mult=[4.34136,3.31386,4.89525,2.82299,1.61302,2.47225,2.44125,2.48126,2.26983,2.49642,2.7562,3.37396,4.73403,4.81802,4.64293,6.91058,6.93203,4.24906,6.27138,4.13608,3.03496,3.38188,5.06824,4.59321] qmult=[1.48589,0.507888,1.58242,0.632166,0.587205,1.11997,1.01409,0.947362,1.03382,0.88129,0.538922,0.644745,2.10215,1.828,1.82328,2.09144,0.425414,1.96922,1.19811,1.81597,1.04688,0.819444,0.746004,1.87613] useactual=yes
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new object=loadshape.load3_3 npts=8739 minterval=60 mult=[5.70922,5.36526,3.46081,2.29468,2.31434,2.27076,2.18643,2.03902,2.22716,4.16394,4.40886,4.24772,5.47122,6.84274,4.8211,5.59588,5.27158,6.2484,6.98898,4.88437,5.0457,5.56355,5.82938,4.81525] qmult=[2.58022,2.00485,1.66436,0.251534,0.412133,0.696027,0.815901,0.95507,1.00144,2.00019,1.62611,1.35332,1.54931,3.28106,1.65866,2.43052,1.26884,1.51108,2.61166,1.04524,1.76529,1.13679,1.25686,2.00775] useactual=yes
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new object=loadshape.load3_4 npts=8739 minterval=60 mult=[4.98043,5.10433,5.3595,2.55238,2.48984,3.39049,3.03558,2.41415,3.07759,3.73375,3.7904,3.51716,2.81995,2.9338,3.94167,4.58671,2.71519,3.09383,4.18551,3.28102,4.09262,3.93419,5.24469,6.66071] qmult=[2.34388,1.74546,1.86448,0.9442,0.944257,1.32888,0.923204,0.45935,0.53859,1.16492,1.29206,0.830458,0.715418,0.329217,1.60071,1.95958,0.561115,0.977345,1.28536,1.20956,0.625026,0.790875,1.6478,0.681266] useactual=yes
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new object=loadshape.load3_5 npts=8739 minterval=60 mult=[6.92713,5.82044,4.20155,1.66858,1.33109,1.5499,1.5111,1.53325,1.61425,3.00504,4.83298,3.12447,3.27832,3.22825,3.52243,2.25369,2.49292,2.67018,1.64805,2.14353,2.13113,2.87723,5.13793,6.18809] qmult=[1.80609,1.69022,1.28144,0.41908,0.381738,0.653943,0.685567,0.565503,0.65769,0.852434,1.49131,1.17624,1.35983,1.38008,0.530584,0.94035,1.04294,0.922105,0.733145,0.821821,0.162917,0.425859,2.14649,2.71591] useactual=yes
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new object=loadshape.load4_1 npts=8739 minterval=60 mult=[3.555,3.94486,4.72969,2.35762,1.55164,1.5107,2.08147,2.95175,3.1113,3.35629,4.39947,6.67242,5.87375,4.33483,5.73838,4.32336,4.51626,4.21745,4.24649,5.71288,4.70666,4.60107,4.7536,6.59064] qmult=[1.44433,1.48912,1.11939,0.449211,0.481344,0.251031,0.843417,1.03515,0.138828,1.55662,1.97288,1.59732,1.6813,1.01995,2.05763,1.41223,1.9856,0.942244,1.91861,1.72249,0.22664,1.89729,0.627951,2.11274] useactual=yes
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new object=loadshape.load4_2 npts=8739 minterval=60 mult=[3.09686,1.90528,1.49279,1.44483,1.64568,1.70723,1.92309,1.9506,2.79266,3.14765,3.32382,2.97324,3.20232,2.88719,2.80906,2.57575,1.66261,1.66703,1.59066,1.4584,1.36053,1.34166,1.39121,1.33619] qmult=[1.28021,0.644782,0.705731,0.328757,0.754883,0.610823,0.485969,0.567667,1.12167,1.42639,1.39506,1.41386,0.263863,0.924012,1.16763,1.03239,0.763405,0.658289,0.490249,0.178785,0.346131,0.647006,0.534995,0.328642] useactual=yes
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new object=loadshape.load4_3 npts=8739 minterval=60 mult=[6.659,5.47102,5.14741,6.22063,2.91228,2.72121,2.70112,2.83114,2.93992,4.49806,6.74846,3.89354,2.78671,2.75811,2.45092,2.80409,3.03246,2.8211,2.45943,2.7044,2.96136,2.53091,2.30294,6.07399] qmult=[3.06216,2.08757,1.95036,2.84727,0.603947,0.120125,1.17299,0.584521,1.41736,1.39558,1.06496,1.6056,0.501302,0.917366,0.855739,1.16433,1.34273,0.998355,1.09781,0.553166,0.998413,0.736165,0.986822,1.19431] useactual=yes
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new object=loadshape.load4_4 npts=8739 minterval=60 mult=[5.99137,5.72896,5.62627,5.6342,5.91001,5.7004,3.44971,3.11577,3.42018,3.06876,5.84806,4.5717,3.10912,2.93366,4.35404,6.15739,4.35902,4.55682,4.38978,4.50858,4.65064,4.42128,6.52715,6.92709] qmult=[2.39941,1.60364,1.93623,1.32438,2.20455,1.13441,1.00949,0.454665,1.16824,1.46558,1.98353,2.12015,0.404543,0.55554,1.10881,1.60466,1.99534,1.73416,0.156917,1.99787,0.98076,1.44638,1.85493,1.47385] useactual=yes
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new object=loadshape.load4_5 npts=8739 minterval=60 mult=[1.66403,1.73333,1.67841,1.66446,1.66185,1.6386,1.60258,1.61711,1.5542,1.54258,1.53487,1.5231,1.57976,1.65197,1.6097,1.61332,1.61507,1.60911,1.6187,1.68349,1.65357,1.61362,1.64064,1.63729] qmult=[0.59895,0.571795,0.756056,0.664417,0.597346,0.621676,0.518472,0.685354,0.41837,0.237466,0.134341,0.181905,0.671799,0.327988,0.333151,0.687318,0.705481,0.724857,0.171859,0.675162,0.638955,0.459388,0.72971,0.750131] useactual=yes
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new object=loadshape.load5_1 npts=8739 minterval=60 mult=[6.58822,6.57427,6.31655,4.49657,2.05741,1.58024,1.95969,3.47103,1.59139,3.03595,2.39005,1.96139,6.49653,6.08585,6.74008,2.85014,1.91569,2.31071,4.40286,7.39988,7.97451,9.50573,6.11035,5.94735] qmult=[0.435547,1.29667,2.51278,2.12437,0.113858,0.352865,0.14327,1.06769,0.495293,1.14763,0.757001,0.39232,2.60081,1.97249,2.61277,0.673979,0.621392,0.502365,1.11708,2.6998,2.39501,2.88223,2.22707,1.65645] useactual=yes
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new object=loadshape.load5_2 npts=8739 minterval=60 mult=[7.23149,6.87275,6.68911,6.393,7.34867,9.40916,3.63339,3.60488,3.73636,7.99804,6.18027,8.13048,4.94348,5.08426,5.29331,3.42125,3.37277,3.51064,3.29888,6.37341,8.36298,5.06546,5.21516,5.57177] qmult=[2.43612,1.5224,1.18221,2.70386,2.50544,1.91232,1.16899,0.515609,0.099476,3.58007,0.426052,2.96312,0.290708,1.63842,2.03787,1.02577,1.23397,1.5212,0.291683,0.829373,0.724051,0.308764,1.57386,1.57882] useactual=yes
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new object=loadshape.load5_3 npts=8739 minterval=60 mult=[6.64724,6.70038,6.38859,6.83537,6.24169,6.74686,6.35344,6.75774,6.77171,6.66809,6.59149,6.20413,6.55668,6.78969,6.75694,6.38768,6.7851,6.63706,6.80927,6.44973,6.35298,6.28382,6.73896,6.48477] qmult=[1.33295,1.25317,2.58548,2.18534,1.27936,2.40558,2.85062,2.19028,2.35234,0.318173,2.14525,1.06036,2.8733,2.98266,0.888914,1.39682,2.46028,1.75277,2.59695,1.74848,2.95617,2.6216,1.13787,1.76047] useactual=yes
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new object=loadshape.load5_4 npts=8739 minterval=60 mult=[8.08907,7.65937,7.6588,4.54648,3.78891,3.16076,2.75116,3.36367,3.65446,3.90364,3.76767,3.9318,3.36717,3.60791,8.17459,7.92355,6.96984,8.67647,5.65127,6.59904,6.05774,6.21078,8.17962,8.26591] qmult=[2.88848,2.3804,2.54961,1.59615,0.793139,1.47767,1.29524,1.55156,1.15458,1.40233,0.85954,1.26206,1.4264,0.948785,0.858148,3.54902,3.22759,3.81459,1.16041,2.97144,1.00547,2.02258,1.82532,3.60547] useactual=yes
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new object=loadshape.load6_1 npts=8739 minterval=60 mult=[3.81087,6.39022,6.28385,7.06443,2.11177,1.97189,2.25677,4.01341,2.2208,2.17133,6.70127,9.46796,1.46787,1.80626,2.07192,7.31078,2.27445,3.73131,2.09379,2.05564,4.097,1.68281,4.22743,6.07943] qmult=[1.55919,2.89019,1.59589,2.9519,0.787223,0.448577,0.479097,1.24934,0.641479,0.557384,2.98449,1.56184,0.46198,0.672372,0.987501,2.50378,0.911902,1.23125,0.766569,0.748632,1.34,0.442502,1.69874,2.11081] useactual=yes
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new object=loadshape.load6_2 npts=8739 minterval=60 mult=[7.54189,5.15022,3.11281,2.30377,2.2045,2.17317,1.77484,1.83634,1.97855,2.97781,3.59565,3.66713,2.68202,2.19465,6.82556,7.33918,3.17773,2.59677,1.95393,2.25603,2.9384,3.66423,3.29203,3.45394] qmult=[2.16275,1.40396,1.45448,0.74458,0.905247,0.687304,0.536922,0.507144,0.482717,0.332256,0.374701,1.11215,0.423841,0.711239,3.176,2.39126,0.861236,0.343766,0.687169,0.197493,1.34473,1.00594,0.94983,0.578754] useactual=yes
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new object=loadshape.load6_3 npts=8739 minterval=60 mult=[9.62241,8.94982,6.60845,2.51486,2.15688,3.05323,6.81553,5.93906,2.15778,3.01555,5.03152,6.98703,6.14806,9.30866,7.78744,7.17849,9.50248,7.36929,6.58787,8.73515,8.69582,7.59982,8.06979,7.62538] qmult=[3.49799,1.47818,2.08242,0.246756,0.5589,0.35426,1.5677,1.18428,0.67738,1.25289,2.17486,2.69685,0.390438,2.00881,0.80066,1.93435,4.28175,0.451771,0.85329,2.67631,1.94586,1.28158,2.72387,3.61505] useactual=yes
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new object=loadshape.load6_4 npts=8739 minterval=60 mult=[6.43353,6.64753,7.88414,7.11313,6.6537,4.15113,9.00694,9.40307,8.47919,5.77403,7.94987,5.25883,6.73109,4.14725,9.67407,4.65377,5.16596,3.69397,2.64684,2.56354,2.69858,6.57582,5.50888,6.25347] qmult=[1.16595,2.18208,3.14833,2.59674,2.59753,0.785832,3.32526,4.50133,1.91172,2.32297,3.03033,2.40286,2.02142,1.79036,4.60092,2.22343,1.82209,1.52781,0.522286,0.563618,1.19243,0.689925,2.4957,2.16117] useactual=yes
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new object=loadshape.load7_1 npts=8739 minterval=60 mult=[6.9534,7.91021,7.10418,6.49627,6.77023,5.62991,5.13166,5.97222,4.63394,4.59176,5.83052,6.44465,7.09955,6.03273,8.59447,7.9321,6.34853,6.30326,6.99238,7.65885,6.46014,6.14969,5.84726,6.35458] qmult=[1.61191,2.86704,1.67605,2.48956,2.99429,2.56055,1.24426,1.93648,1.63553,0.994768,2.31237,2.79043,0.868425,1.6946,1.66415,1.25044,1.36601,2.44256,2.98623,3.64402,1.9904,0.746616,2.70022,2.39857] useactual=yes
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new object=loadshape.load7_2 npts=8739 minterval=60 mult=[7.85494,6.21524,9.86239,3.82278,3.29681,3.27155,3.31299,3.82842,4.49673,4.59734,5.31888,6.45228,4.30336,3.21875,3.21343,3.17753,3.0644,3.33877,3.83176,3.77843,3.52859,5.49524,8.18517,9.07276] qmult=[1.45607,1.85027,1.91101,0.521074,0.674914,0.627938,1.4577,1.74286,0.682314,1.09651,1.40868,2.85158,1.88449,1.04828,1.24271,0.863801,0.703238,0.249768,1.0476,0.57229,0.759706,1.12649,1.13698,1.95837] useactual=yes
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new object=loadshape.load7_3 npts=8739 minterval=60 mult=[9.82195,9.42566,8.69261,8.78485,4.10701,4.46638,3.17763,4.54642,3.58389,5.81104,3.88531,6.22232,6.99185,7.29402,6.37236,4.51561,6.27221,4.58193,5.7176,4.71622,5.60607,4.71186,9.25953,9.37168] qmult=[0.662495,3.72024,1.48704,1.11024,1.7384,0.981911,1.49388,1.95999,1.03818,1.70237,1.84529,2.32212,2.89053,2.74858,2.07265,1.7411,2.09852,1.10274,0.277504,2.21219,1.45458,2.23745,4.0983,3.15077] useactual=yes
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new object=loadshape.load7_4 npts=8739 minterval=60 mult=[3.31981,3.26395,3.18663,3.23497,3.25605,3.37526,3.14697,3.41901,5.03155,7.19382,7.7135,8.95324,3.15541,2.55391,2.71792,5.88333,7.03929,5.31688,5.3784,4.98373,2.90932,4.99308,6.28749,8.45239] qmult=[0.604265,1.35528,0.476701,1.56108,1.27431,1.46515,0.488392,1.46716,1.10251,3.33013,1.56635,2.2304,1.392,1.06428,1.13791,2.45019,2.06189,1.14453,1.41295,0.831633,0.516772,2.01885,2.78969,0.383754] useactual=yes
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new object=loadshape.load8_1 npts=8739 minterval=60 mult=[7.40372,6.85071,6.70709,6.39437,8.13082,9.1375,9.2271,7.43359,7.93942,7.93145,6.63467,6.17593,8.90913,8.93278,5.55647,3.60207,3.97875,5.42856,3.86782,3.11032,2.02125,2.16261,2.14212,1.616] qmult=[1.08815,3.24257,2.01604,2.92017,1.7407,3.65431,3.96378,2.05468,3.08585,0.474179,2.65837,1.88315,4.13412,2.06013,2.39734,0.770353,0.599601,2.11969,0.513902,1.23337,0.830053,0.354319,0.555313,0.59858] useactual=yes
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new object=loadshape.load8_2 npts=8739 minterval=60 mult=[9.49312,8.48893,7.89985,9.02634,2.01461,2.18398,1.90965,1.88311,3.71755,2.06836,4.72359,8.55898,6.73743,8.43777,7.01288,4.57552,9.5639,9.43229,4.47056,3.27825,3.26777,9.21322,9.28544,9.39883] qmult=[4.254,2.37292,2.02823,3.95079,0.579339,0.743525,0.602007,0.579612,1.69018,0.935653,2.2459,2.58239,2.25931,3.56749,2.73962,1.97764,0.47009,1.91193,2.01099,0.783107,1.16505,1.4702,0.506276,4.21811] useactual=yes
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new object=loadshape.load8_3 npts=8739 minterval=60 mult=[5.33753,5.6128,6.83503,4.87916,4.44761,5.28465,5.64738,5.7709,6.68852,6.50489,6.17149,5.41631,4.2196,3.80398,4.13213,4.01967,3.72357,5.43478,6.02752,4.75656,5.89078,5.14266,5.52768,6.33828] qmult=[1.45094,0.429839,3.12943,1.1409,0.964465,1.00232,1.719,2.58963,1.81561,2.83561,2.85585,1.62208,1.55994,0.93264,0.382203,1.24777,0.905896,1.88995,0.458609,0.356645,2.079,1.92877,1.86933,0.876843] useactual=yes
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new object=loadshape.load8_4 npts=8739 minterval=60 mult=[9.26824,6.29941,8.87998,6.98784,8.99746,6.86116,9.80201,6.91451,3.90339,3.05878,8.59535,9.32345,6.1136,5.6803,5.33604,5.66079,5.25552,4.13702,4.37534,4.17987,3.58209,5.02227,8.58312,9.32853] qmult=[3.51047,1.65428,3.13467,2.66254,3.04702,2.84964,0.916952,0.545839,1.26138,1.12268,4.12352,2.53718,1.6131,1.57323,2.3262,0.692968,2.5148,0.980794,1.56338,1.31288,0.57719,0.774742,1.52699,3.0055] useactual=yes
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new object=loadshape.load9_1 npts=8739 minterval=60 mult=[19.4591,16.5454,13.3961,13.4115,12.2243,12.2032,12.3095,12.1166,10.9574,13.5944,17.5069,15.5609,16.5146,10.7512,10.9458,10.9831,12.2032,14.9105,14.7318,13.4193,14.52,17.6175,12.7989,17.582] qmult=[4.99586,4.5575,4.90712,3.98486,4.86985,5.3583,1.93185,3.21357,3.67696,2.95337,5.58878,4.04302,1.22604,2.30894,4.3908,4.90099,2.74056,3.67177,6.37809,3.51656,3.96583,5.80777,1.10666,4.99117] useactual=yes
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new object=loadshape.load9_2 npts=8739 minterval=60 mult=[17.8921,19.4441,15.3101,14.7266,17.5237,17.2549,9.10439,12.7457,14.2639,14.6967,18.8191,17.7332,15.356,9.45277,6.03506,4.4104,5.02996,6.62541,8.24927,8.94641,9.64835,10.2063,13.3304,11.3882] qmult=[7.10862,7.24867,6.00642,4.26261,4.38475,5.5974,3.70883,4.4262,3.32725,5.08566,8.3694,6.22637,6.19017,2.24511,2.63964,0.80859,1.96668,1.74649,2.63684,3.80094,1.31341,1.52539,2.93232,1.14899] useactual=yes
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new object=loadshape.load10_1 npts=8739 minterval=60 mult=[15.8669,16.025,16.1571,14.634,16.1501,8.20725,4.78391,7.86145,5.01444,7.82493,9.17011,9.26215,14.3976,7.00478,8.91298,11.1043,17.9184,19.3254,9.65904,4.23482,9.29171,17.1084,14.576,13.6941] qmult=[6.5385,4.25454,7.04813,2.12472,5.52248,3.01897,1.8903,3.36033,0.72939,1.87441,2.25715,1.88638,4.09992,2.40785,2.95852,4.64633,3.75355,9.23682,2.99232,1.70889,4.38212,6.46236,4.37871,2.76146] useactual=yes
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new object=loadshape.load10_2 npts=8739 minterval=60 mult=[12.6296,8.37256,5.56388,6.79528,11.1089,13.8264,15.209,15.6749,16.4565,17.0674,17.1311,17.3625,12.7719,15.3844,14.6326,16.1768,14.1852,15.3309,13.9706,19.2264,16.8792,13.0732,16.6382,14.4284] qmult=[5.54244,3.84201,1.10632,2.05627,2.34694,0.510336,4.71732,3.89568,6.37743,7.92849,6.56993,5.59978,1.76926,5.13194,4.76875,4.39363,6.01821,4.03292,3.70401,9.05277,7.07654,1.63468,4.977,6.60529] useactual=yes
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

!!!vsource.dss
edit object=vsource.source pu=1.0 bus1=bussource.1.2.3 basekv=46.0 r1=1.036 x1=10.143 r0=5.462 x0=34.19 duty=subvoltage


!!!transformer.dss


!!!transformers.dss
new object=transformer.subxfmr phases=3 windings=2 %noloadloss=0 buses=[mdv_sub_1_hsb.1,feederheadbus.1] conns=[delta,wye] kvs=[46,12.47] kvas=[7500,7500] taps=[1,1.025] wdg=1 %r=0.1602998 rdcohms=0.3844202 wdg=2 %r=0.1602998 rdcohms=0.009416774 xhl=6.41199 sub=yes
new object=regcontrol.ltc_subxfmr_a transformer=subxfmr winding=2 tapwinding=2 band=3.0 vreg=124.0 ptphase=1
new object=transformer.trafo1 phases=1 buses=[busprim1.1,bustrafo1lv.1] conns=[wye,wye] kvs=[7.199558,0.24] kvas=[50,50] taps=[1,1] wdg=1 %r=0.59 rdcohms=5.198913 wdg=2 %r=0.59 rdcohms=0.00577728 xhl=1.44 %rs=[0.59,0.59] ppm_antifloat=0
new object=transformer.trafo2 phases=1 buses=[busprim2.2,bustrafo2lv.2] conns=[wye,wye] kvs=[7.199558,0.24] kvas=[50,50] taps=[1,1] wdg=1 %r=0.59 rdcohms=5.198913 wdg=2 %r=0.59 rdcohms=0.00577728 xhl=1.44 %rs=[0.59,0.59] ppm_antifloat=0
new object=transformer.trafo3 phases=1 buses=[busprim3.3,bustrafo3lv.3] conns=[wye,wye] kvs=[7.199558,0.24] kvas=[50,50] taps=[1,1] wdg=1 %r=0.59 rdcohms=5.198913 wdg=2 %r=0.59 rdcohms=0.00577728 xhl=1.44 %rs=[0.59,0.59] ppm_antifloat=0
new object=transformer.trafo4 phases=1 buses=[busprim4.1,bustrafo4lv.1] conns=[wye,wye] kvs=[7.199558,0.24] kvas=[50,50] taps=[1,1] wdg=1 %r=0.59 rdcohms=5.198913 wdg=2 %r=0.59 rdcohms=0.00577728 xhl=1.44 %rs=[0.59,0.59] ppm_antifloat=0
new object=transformer.trafo5 phases=1 buses=[busprim5.3,bustrafo5lv.3] conns=[wye,wye] kvs=[7.199558,0.24] kvas=[50,50] taps=[1,1] wdg=1 %r=0.59 rdcohms=5.198913 wdg=2 %r=0.59 rdcohms=0.00577728 xhl=1.44 %rs=[0.59,0.59] ppm_antifloat=0
new object=transformer.trafo6 phases=1 buses=[busprim6.3,bustrafo6lv.3] conns=[wye,wye] kvs=[7.199558,0.24] kvas=[50,50] taps=[1,1] wdg=1 %r=0.59 rdcohms=5.198913 wdg=2 %r=0.59 rdcohms=0.00577728 xhl=1.44 %rs=[0.59,0.59] ppm_antifloat=0
new object=transformer.trafo7 phases=1 buses=[busprim7.1,bustrafo7lv.1] conns=[wye,wye] kvs=[7.199558,0.24] kvas=[50,50] taps=[1,1] wdg=1 %r=0.59 rdcohms=5.198913 wdg=2 %r=0.59 rdcohms=0.00577728 xhl=1.44 %rs=[0.59,0.59] ppm_antifloat=0
new object=transformer.trafo8 phases=1 buses=[busprim8.2,bustrafo8lv.2] conns=[wye,wye] kvs=[7.199558,0.24] kvas=[50,50] taps=[1,1] wdg=1 %r=0.59 rdcohms=5.198913 wdg=2 %r=0.59 rdcohms=0.00577728 xhl=1.44 %rs=[0.59,0.59] ppm_antifloat=0
new object=transformer.trafo9 phases=1 buses=[busprim9.3,bustrafo9lv.3] conns=[wye,wye] kvs=[7.199558,0.24] kvas=[50,50] taps=[1,1] wdg=1 %r=0.59 rdcohms=5.198913 wdg=2 %r=0.59 rdcohms=0.00577728 xhl=1.44 %rs=[0.59,0.59] ppm_antifloat=0
new object=transformer.trafo10 phases=1 buses=[busprim10.2,bustrafo10lv.2] conns=[wye,wye] kvs=[7.199558,0.24] kvas=[50,50] taps=[1,1] wdg=1 %r=0.59 rdcohms=5.198913 wdg=2 %r=0.59 rdcohms=0.00577728 xhl=1.44 %rs=[0.59,0.59] ppm_antifloat=0
new object=transformer.trafo11 phases=1 buses=[busprim11.2,bustrafo11lv.2] conns=[wye,wye] kvs=[7.199558,0.24] kvas=[50,50] taps=[1,1] wdg=1 %r=0.59 rdcohms=5.198913 wdg=2 %r=0.59 rdcohms=0.00577728 xhl=1.44 %rs=[0.59,0.59] ppm_antifloat=0
new object=transformer.trafo12 phases=1 buses=[busprim12.1,xfmrlv.1] conns=[wye,wye] kvs=[7.199558,0.24] kvas=[50,50] taps=[1,1] wdg=1 %r=0.59 rdcohms=5.198913 wdg=2 %r=0.59 rdcohms=0.00577728 xhl=1.44 %rs=[0.59,0.59] ppm_antifloat=0


!!!regcontrol.dss


!!!linecode.dss
new object=linecode.busbar nphases=3 r1=0.0001 x1=0.0001 r0=0.0001 x0=0.0001 c1=0 c0=0 units=km basefreq=60 normamps=2000 emergamps=2000 faultrate=0.1 pctperm=20 repair=3
new object=linecode.oh-3x_477aac_4/0aaacn nphases=3 r1=0.12241 x1=0.39494 r0=0.33466 x0=1.2743 c1=11.197 c0=4.8089 units=km basefreq=60 normamps=732 emergamps=871
new object=linecode.triplex1phequivalent4 nphases=1 units=kft rmatrix=[0.92900000] xmatrix=[0.08910000] cmatrix=[0.00000000] normamps=150 emergamps=195 rg=0 xg=0
new object=linecode.triplex1phequivalent1/0 nphases=1 units=kft rmatrix=[0.36740000] xmatrix=[0.08560000] cmatrix=[0.00000000] normamps=280 emergamps=350 rg=0 xg=0
new object=linecode.triplex1phequivalent3/0 nphases=1 units=kft rmatrix=[0.23140000] xmatrix=[0.08730000] cmatrix=[0.00000000] normamps=375 emergamps=480 rg=0 xg=0
new object=linecode.triplex1phequivalent4/0 nphases=1 rmatrix=[0.18333334] xmatrix=[0.07840812] cmatrix=[15.00000000] units=kft normamps=299 emergamps=373.75


!!!spectrum.dss
new object=spectrum.default numharm=7 harmonic=(1,3,5,7,9,11,13) %mag=(100,33,20,14.000000000000002,11,9,7.0000000000000009) angle=(0,0,0,0,0,0,0)
new object=spectrum.defaultload numharm=7 harmonic=(1,3,5,7,9,11,13) %mag=(100,1.5,20,14.000000000000002,1,9,7.0000000000000009) angle=(0,180,180,180,180,180,180)
new object=spectrum.defaultgen numharm=7 harmonic=(1,3,5,7,9,11,13) %mag=(100,5,3,1.5,1,0.69999999999999996,0.5) angle=(0,0,0,0,0,0,0)
new object=spectrum.defaultvsource numharm=1 harmonic=(1) %mag=(100) angle=(0)
new object=spectrum.linear numharm=1 harmonic=(1) %mag=(100) angle=(0)
new object=spectrum.pwm6 numharm=13 harmonic=(1,3,5,7,9,11,13,15,17,19,21,23,25) %mag=(100,4.4000000000000004,76.5,62.700000000000003,2.8999999999999999,24.800000000000001,12.699999999999999,0.5,7.0999999999999996,8.4000000000000004,0.90000000000000013,4.4000000000000004,3.3000000000000003) angle=(-103,-5,28,-180,-33,-59,79,36,-253,-124,3,-30,86)
new object=spectrum.dc6 numharm=10 harmonic=(1,3,5,7,9,11,13,15,17,19) %mag=(100,1.2,33.600000000000001,1.6000000000000001,0.40000000000000002,8.6999999999999993,1.2,0.29999999999999999,4.5,1.3) angle=(-75,28,156,29,-91,49,54,148,-57,-46)


!!!tcc_curve.dss
new object=tcc_curve.a npts=5 c_array=[1,2.5,4.5,8,14] t_array=[0.15,0.07,0.05,0.045,0.045]
new object=tcc_curve.d npts=5 c_array=[1,2.5,4.5,8,14] t_array=[6,0.7,0.2,0.06,0.02]
new object=tcc_curve.tlink npts=7 c_array=[2,2.1,3,4,6,22,50] t_array=[300,100,10.1,4,1.4,0.1,0.02]
new object=tcc_curve.klink npts=6 c_array=[2,2.2,3,4,6,30] t_array=[300,20,4,1.3,0.41,0.02]
new object=tcc_curve.uv1547 npts=2 c_array=[0.5,0.9] t_array=[0.166,2]
new object=tcc_curve.ov1547 npts=2 c_array=[1.1,1.2] t_array=[2,0.166]
new object=tcc_curve.mod_inv npts=15 c_array=[1.1,1.3,1.5,2,3,4,5,6,7,8,9,10,20,50,100] t_array=[27.1053,9.9029,6.439,3.8032,2.4322,1.9458,1.6883,1.5255,1.4117,1.3267,1.2604,1.2068,0.9481,0.7468,0.6478]
new object=tcc_curve.very_inv npts=15 c_array=[1.1,1.3,1.5,2,3,4,5,6,7,8,9,10,20,50,100] t_array=[93.872,28.9113,16.179,7.0277,2.9423,1.7983,1.3081,1.0513,0.8995,0.8023,0.7361,0.6891,0.5401,0.4988,0.493]
new object=tcc_curve.ext_inv npts=15 c_array=[1.1,1.3,1.5,2,3,4,5,6,7,8,9,10,20,50,100] t_array=[134.407,40.9913,22.6817,9.5217,3.6467,2.0017,1.2967,0.9274,0.7092,0.5693,0.4742,0.4065,0.1924,0.133,0.1245]
new object=tcc_curve.definite npts=3 c_array=[1,1.001,100] t_array=[300,1,1]


!!!growthshape.dss
new object=growthshape.default npts=2 year=(1,20) mult=(1.0249999999999999,1.0249999999999999)


!!!line.dss


!!!branches.dss
new object=line.mdv_sub_1_hsb bus1=bussource.1.2.3 bus2=mdv_sub_1_hsb.1 length=0.001 linecode=busbar seasons=1 ratings=[400] normamps=2000 emergamps=2000 units=m enabled=true phases=3
new object=line.ssswitch bus1=feederheadbus.1 bus2=busprim1.1 length=1 linecode=busbar seasons=1 ratings=[400] emergamps=2000 units=m enabled=true phases=3 normamps=1500
new object=line.linesec1_5 bus1=bustrafo1lv.1 bus2=bussec1_5.1 length=70 phases=1 units=ft linecode=triplex1phequivalent4 seasons=1 ratings=[400] normamps=150 emergamps=195 enabled=true
new object=line.linesec1_4 bus1=bustrafo1lv.1 bus2=bussec1_4.1 length=85 phases=1 units=ft linecode=triplex1phequivalent4 seasons=1 ratings=[400] normamps=150 emergamps=195 enabled=true
new object=line.linesec1_3 bus1=bustrafo1lv.1 bus2=bussec1_3.1 length=95 phases=1 units=ft linecode=triplex1phequivalent4 seasons=1 ratings=[400] normamps=150 emergamps=195 enabled=true
new object=line.linesec1_2 bus1=bustrafo1lv.1 bus2=bussec1_2.1 length=85 phases=1 units=ft linecode=triplex1phequivalent4 seasons=1 ratings=[400] normamps=150 emergamps=195 enabled=true
new object=line.linesec1_1 bus1=bustrafo1lv.1 bus2=bussec1_1.1 length=70 phases=1 units=ft linecode=triplex1phequivalent4 seasons=1 ratings=[400] normamps=150 emergamps=195 enabled=true
new object=line.line1 bus1=busprim1.1 bus2=busprim2.1/ length=100 phases=3 units=m linecode=oh-3x_477aac_4/0aaacn seasons=1 ratings=[400] normamps=732 emergamps=871 enabled=true
new object=line.linesec2_1 bus1=bustrafo2lv.2 bus2=bussec2_1.2 length=125 phases=1 units=ft linecode=triplex1phequivalent1/0 seasons=1 ratings=[400] normamps=280 emergamps=350 enabled=true
new object=line.line2 bus1=busprim2.2 bus2=busprim3.3 length=100 phases=3 units=m linecode=oh-3x_477aac_4/0aaacn seasons=1 ratings=[400] normamps=732 emergamps=871 enabled=true
new object=line.linesec3_1 bus1=bustrafo3lv.3 bus2=bussec3_1.3 length=60 phases=1 units=ft linecode=triplex1phequivalent1/0 seasons=1 ratings=[400] normamps=280 emergamps=350 enabled=true
new object=line.linesec3_2 bus1=bussec3_1.3 bus2=bussec3_2.3 length=60 phases=1 units=ft linecode=triplex1phequivalent1/0 seasons=1 ratings=[400] normamps=280 emergamps=350 enabled=true
new object=line.linesec3_3 bus1=bussec3_2.3 bus2=bussec3_3.3 length=60 phases=1 units=ft linecode=triplex1phequivalent1/0 seasons=1 ratings=[400] normamps=280 emergamps=350 enabled=true
new object=line.linesec3_4 bus1=bussec3_3.3 bus2=bussec3_4.3 length=60 phases=1 units=ft linecode=triplex1phequivalent1/0 seasons=1 ratings=[400] normamps=280 emergamps=350 enabled=true
new object=line.linesec3_5 bus1=bussec3_4.3 bus2=bussec3_5.3 length=60 phases=1 units=ft linecode=triplex1phequivalent1/0 seasons=1 ratings=[400] normamps=280 emergamps=350 enabled=true
new object=line.line3 bus1=busprim3.3 bus2=busprim4.1 length=100 phases=3 units=m linecode=oh-3x_477aac_4/0aaacn seasons=1 ratings=[400] normamps=732 emergamps=871 enabled=true
new object=line.linesec4_0 bus1=bustrafo4lv.1 bus2=bussec4_0.1 length=55 phases=1 linecode=triplex1phequivalent1/0 seasons=1 ratings=[400] normamps=280 emergamps=350 units=m enabled=true
new object=line.linesec4_5 bus1=bussec4_0.1 bus2=bussec4_5.1 length=45 phases=1 units=ft linecode=triplex1phequivalent1/0 seasons=1 ratings=[400] normamps=280 emergamps=350 enabled=true
new object=line.linesec4_4 bus1=bussec4_0.1 bus2=bussec4_4.1 length=65 phases=1 units=ft linecode=triplex1phequivalent1/0 seasons=1 ratings=[400] normamps=280 emergamps=350 enabled=true
new object=line.linesec4_3 bus1=bussec4_0.1 bus2=bussec4_3.1 length=45 phases=1 units=ft linecode=triplex1phequivalent1/0 seasons=1 ratings=[400] normamps=280 emergamps=350 enabled=true
new object=line.linesec4_2 bus1=bussec4_0.1 bus2=bussec4_2.1 length=45 phases=1 units=ft linecode=triplex1phequivalent1/0 seasons=1 ratings=[400] normamps=280 emergamps=350 enabled=true
new object=line.linesec4_1 bus1=bussec4_0.1 bus2=bussec4_1.1 length=45 phases=1 units=ft linecode=triplex1phequivalent1/0 seasons=1 ratings=[400] normamps=280 emergamps=350 enabled=true
new object=line.line4 bus1=busprim4.1 bus2=busprim5.3 length=100 phases=3 units=m linecode=oh-3x_477aac_4/0aaacn seasons=1 ratings=[400] normamps=732 emergamps=871 enabled=true
new object=line.linesec5_4 bus1=bustrafo5lv.3 bus2=bussec5_4.3 length=70 phases=1 units=ft linecode=triplex1phequivalent4 seasons=1 ratings=[400] normamps=150 emergamps=195 enabled=true
new object=line.linesec5_3 bus1=bustrafo5lv.3 bus2=bussec5_3.3 length=70 phases=1 units=ft linecode=triplex1phequivalent4 seasons=1 ratings=[400] normamps=150 emergamps=195 enabled=true
new object=line.linesec5_0 bus1=bustrafo5lv.3 bus2=bussec5_0.3 length=225 phases=1 units=ft linecode=triplex1phequivalent1/0 seasons=1 ratings=[400] normamps=280 emergamps=350 enabled=true
new object=line.linesec5_2 bus1=bussec5_0.3 bus2=bussec5_2.3 length=60 phases=1 units=ft linecode=triplex1phequivalent1/0 seasons=1 ratings=[400] normamps=280 emergamps=350 enabled=true
new object=line.linesec5_1 bus1=bussec5_0.3 bus2=bussec5_1.3 length=60 phases=1 units=ft linecode=triplex1phequivalent1/0 seasons=1 ratings=[400] normamps=280 emergamps=350 enabled=true
new object=line.line5 bus1=busprim5.3 bus2=busprim6.3 length=100 phases=3 units=m linecode=oh-3x_477aac_4/0aaacn seasons=1 ratings=[400] normamps=732 emergamps=871 enabled=true
new object=line.linesec6_02 bus1=bustrafo6lv.3 bus2=bussec6_02.3 length=200 phases=1 units=ft linecode=triplex1phequivalent1/0 seasons=1 ratings=[400] normamps=280 emergamps=350 enabled=true
new object=line.linesec6_4 bus1=bussec6_02.3 bus2=bussec6_4.3 length=65 phases=1 units=ft linecode=triplex1phequivalent1/0 seasons=1 ratings=[400] normamps=280 emergamps=350 enabled=true
new object=line.linesec6_3 bus1=bussec6_02.3 bus2=bussec6_3.3 length=65 phases=1 units=ft linecode=triplex1phequivalent1/0 seasons=1 ratings=[400] normamps=280 emergamps=350 enabled=true
new object=line.linesec6_01 bus1=bustrafo6lv.3 bus2=bussec6_01.3 length=200 phases=1 units=ft linecode=triplex1phequivalent1/0 seasons=1 ratings=[400] normamps=280 emergamps=350 enabled=true
new object=line.linesec6_2 bus1=bussec6_01.3 bus2=bussec6_2.3 length=65 phases=1 units=ft linecode=triplex1phequivalent1/0 seasons=1 ratings=[400] normamps=280 emergamps=350 enabled=true
new object=line.linesec6_1 bus1=bussec6_01.3 bus2=bussec6_1.3 length=65 phases=1 units=ft linecode=triplex1phequivalent1/0 seasons=1 ratings=[400] normamps=280 emergamps=350 enabled=true
new object=line.line6 bus1=busprim6.3 bus2=busprim7.1 length=100 phases=3 units=m linecode=oh-3x_477aac_4/0aaacn seasons=1 ratings=[400] normamps=732 emergamps=871 enabled=true
new object=line.linesec7_01 bus1=bustrafo7lv.1 bus2=bussec7_01.1 length=100 phases=1 units=ft linecode=triplex1phequivalent1/0 seasons=1 ratings=[400] normamps=280 emergamps=350 enabled=true
new object=line.linesec7_2 bus1=bussec7_01.1 bus2=bussec7_2.1 length=60 phases=1 units=ft linecode=triplex1phequivalent1/0 seasons=1 ratings=[400] normamps=280 emergamps=350 enabled=true
new object=line.linesec7_1 bus1=bussec7_01.1 bus2=bussec7_1.1 length=60 phases=1 units=ft linecode=triplex1phequivalent1/0 seasons=1 ratings=[400] normamps=280 emergamps=350 enabled=true
new object=line.linesec7_02 bus1=bussec7_01.1 bus2=bussec7_02.1 length=50 phases=1 units=ft linecode=triplex1phequivalent1/0 seasons=1 ratings=[400] normamps=280 emergamps=350 enabled=true
new object=line.linesec7_4 bus1=bussec7_02.1 bus2=bussec7_4.1 length=60 phases=1 units=ft linecode=triplex1phequivalent1/0 seasons=1 ratings=[400] normamps=280 emergamps=350 enabled=true
new object=line.linesec7_3 bus1=bussec7_02.1 bus2=bussec7_3.1 length=60 phases=1 units=ft linecode=triplex1phequivalent1/0 seasons=1 ratings=[400] normamps=280 emergamps=350 enabled=true
new object=line.line7 bus1=busprim7.1 bus2=busprim8.2 length=100 phases=3 units=m linecode=oh-3x_477aac_4/0aaacn seasons=1 ratings=[400] normamps=732 emergamps=871 enabled=true
new object=line.linesec8_01 bus1=bustrafo8lv.2 bus2=bussec8_01.2 length=60 phases=1 units=ft linecode=triplex1phequivalent1/0 seasons=1 ratings=[400] normamps=280 emergamps=350 enabled=true
new object=line.linesec8_1 bus1=bussec8_01.2 bus2=bussec8_1.2 length=40 phases=1 units=ft linecode=triplex1phequivalent1/0 seasons=1 ratings=[400] normamps=280 emergamps=350 enabled=true
new object=line.linesec8_02 bus1=bussec8_01.2 bus2=bussec8_02.2 length=40 phases=1 units=ft linecode=triplex1phequivalent1/0 seasons=1 ratings=[400] normamps=280 emergamps=350 enabled=true
new object=line.linesec8_4 bus1=bussec8_02.2 bus2=bussec8_4.2 length=60 phases=1 units=ft linecode=triplex1phequivalent1/0 seasons=1 ratings=[400] normamps=280 emergamps=350 enabled=true
new object=line.linesec8_3 bus1=bussec8_02.2 bus2=bussec8_3.2 length=60 phases=1 units=ft linecode=triplex1phequivalent1/0 seasons=1 ratings=[400] normamps=280 emergamps=350 enabled=true
new object=line.linesec8_2 bus1=bussec8_02.2 bus2=bussec8_2.2 length=60 phases=1 units=ft linecode=triplex1phequivalent1/0 seasons=1 ratings=[400] normamps=280 emergamps=350 enabled=true
new object=line.line8 bus1=busprim8.2 bus2=busprim9.3 length=100 phases=3 units=m linecode=oh-3x_477aac_4/0aaacn seasons=1 ratings=[400] normamps=732 emergamps=871 enabled=true
new object=line.linesec9_0 bus1=bustrafo9lv.3 bus2=bussec9_0.3 length=75 phases=1 units=ft linecode=triplex1phequivalent1/0 seasons=1 ratings=[400] normamps=280 emergamps=350 enabled=true
new object=line.linesec9_2 bus1=bussec9_0.3 bus2=bussec9_2.3 length=60 phases=1 units=ft linecode=triplex1phequivalent1/0 seasons=1 ratings=[400] normamps=280 emergamps=350 enabled=true
new object=line.linesec9_1 bus1=bussec9_0.3 bus2=bussec9_1.3 length=60 phases=1 units=ft linecode=triplex1phequivalent1/0 seasons=1 ratings=[400] normamps=280 emergamps=350 enabled=true
new object=line.line9 bus1=busprim9.3 bus2=busprim10.2 length=100 phases=3 units=m linecode=oh-3x_477aac_4/0aaacn seasons=1 ratings=[400] normamps=732 emergamps=871 enabled=true
new object=line.linesec10_1 bus1=bustrafo10lv.2 bus2=bussec10_1.2 length=95 phases=1 units=ft linecode=triplex1phequivalent1/0 seasons=1 ratings=[400] normamps=280 emergamps=350 enabled=true
new object=line.linesec10_0 bus1=bustrafo10lv.2 bus2=bussec10_0.2 length=175 phases=1 units=ft linecode=triplex1phequivalent1/0 seasons=1 ratings=[400] normamps=280 emergamps=350 enabled=true
new object=line.linesec10_2 bus1=bussec10_0.2 bus2=bussec10_2.2 length=50 phases=1 units=ft linecode=triplex1phequivalent1/0 seasons=1 ratings=[400] normamps=280 emergamps=350 enabled=true
new object=line.line10 bus1=busprim10.2 bus2=busprim11.2 length=100 phases=3 units=m linecode=oh-3x_477aac_4/0aaacn seasons=1 ratings=[400] normamps=732 emergamps=871 enabled=true
new object=line.linesec11_2 bus1=bustrafo11lv.2 bus2=bussec11_2.2 linecode=triplex1phequivalent4 seasons=1 ratings=[400] normamps=150 emergamps=195 length=167 units=ft
new object=line.linesec11_1 bus1=bustrafo11lv.2 bus2=bussec11_1.2 linecode=triplex1phequivalent4 seasons=1 ratings=[400] normamps=150 emergamps=195 length=122 units=ft
new object=line.line11 bus1=busprim11.2 bus2=busprim12.1 length=100 phases=3 units=m linecode=oh-3x_477aac_4/0aaacn seasons=1 ratings=[400] normamps=732 emergamps=871 enabled=true
new object=line.triplex3 bus1=xfmrlv.1 bus2=buslv3.1 length=187 units=ft linecode=triplex1phequivalent4/0 seasons=1 ratings=[400] normamps=299 emergamps=373.75
new object=line.triplex5 bus1=buslv3.1 bus2=buslv5.1 length=103 units=ft linecode=triplex1phequivalent4/0 seasons=1 ratings=[400] normamps=299 emergamps=373.75
new object=line.triplexload8 bus1=buslv5.1 bus2=busload8.1 length=23 units=ft linecode=triplex1phequivalent4/0 seasons=1 ratings=[400] normamps=299 emergamps=373.75
new object=line.triplexload7 bus1=buslv5.1 bus2=busload7.1 length=42 units=ft linecode=triplex1phequivalent4/0 seasons=1 ratings=[400] normamps=299 emergamps=373.75
new object=line.triplex4 bus1=buslv3.1 bus2=buslv4.1 length=161 units=ft linecode=triplex1phequivalent4/0 seasons=1 ratings=[400] normamps=299 emergamps=373.75
new object=line.triplexload6 bus1=buslv4.1 bus2=busload6.1 length=116 units=ft linecode=triplex1phequivalent4/0 seasons=1 ratings=[400] normamps=299 emergamps=373.75
new object=line.triplexload5 bus1=buslv4.1 bus2=busload5.1 length=286 units=ft linecode=triplex1phequivalent4/0 seasons=1 ratings=[400] normamps=299 emergamps=373.75
new object=line.triplex1 bus1=xfmrlv.1 bus2=buslv1.1 length=106 units=ft linecode=triplex1phequivalent1/0 seasons=1 ratings=[400] normamps=280 emergamps=350
new object=line.triplexload4 bus1=buslv1.1 bus2=busload4.1 length=61 units=ft linecode=triplex1phequivalent1/0 seasons=1 ratings=[400] normamps=280 emergamps=350
new object=line.triplexload3 bus1=buslv1.1 bus2=busload3.1 length=13 units=ft linecode=triplex1phequivalent1/0 seasons=1 ratings=[400] normamps=280 emergamps=350
new object=line.triplex2 bus1=buslv1.1 bus2=buslv2.1 length=206 units=ft linecode=triplex1phequivalent3/0 seasons=1 ratings=[400] normamps=375 emergamps=480
new object=line.triplexload2 bus1=buslv2.1 bus2=busload2.1 length=11 units=ft linecode=triplex1phequivalent3/0 seasons=1 ratings=[400] normamps=375 emergamps=480
new object=line.triplexload1 bus1=buslv2.1 bus2=busload1.1 length=10 units=ft linecode=triplex1phequivalent3/0 seasons=1 ratings=[400] normamps=375 emergamps=480


!!!load.dss


!!!loads.dss
new object=load.load1_5 phases=1 conn=wye bus1=bussec1_5.1 kv=0.23999999999999999 model=1 kw=6.9997600000000002 kvar=3.0417000000000001 vminpu=0.7 vmaxpu=1.4 duty=load1_5
new object=load.load1_4 phases=1 conn=wye bus1=bussec1_4.1 kv=0.23999999999999999 model=1 kw=6.9993499999999997 kvar=2.22336 vminpu=0.7 vmaxpu=1.4 duty=load1_4
new object=load.load1_3 phases=1 conn=wye bus1=bussec1_3.1 kv=0.23999999999999999 model=1 kw=6.9998300000000002 kvar=1.52061 vminpu=0.7 vmaxpu=1.4 duty=load1_3
new object=load.load1_2 phases=1 conn=wye bus1=bussec1_2.1 kv=0.23999999999999999 model=1 kw=6.9986499999999996 kvar=1.85745 vminpu=0.7 vmaxpu=1.4 duty=load1_2
new object=load.load1_1 phases=1 conn=wye bus1=bussec1_1.1 kv=0.23999999999999999 model=1 kw=6.9985099999999996 kvar=2.56115 vminpu=0.7 vmaxpu=1.4 duty=load1_1
new object=load.load2 phases=1 conn=wye bus1=bussec2_1.2 kv=0.23999999999999999 model=1 kw=39.9985 kvar=7.7029300000000003 vminpu=0.7 vmaxpu=1.4 duty=load2
new object=load.load3_1 phases=1 conn=wye bus1=bussec3_1.3 kv=0.23999999999999999 model=1 kw=6.9995099999999999 kvar=1.9220999999999999 vminpu=0.7 vmaxpu=1.4 duty=load3_1
new object=load.load3_2 phases=1 conn=wye bus1=bussec3_2.3 kv=0.23999999999999999 model=1 kw=6.9995399999999997 kvar=2.5578400000000001 vminpu=0.7 vmaxpu=1.4 duty=load3_2
new object=load.load3_3 phases=1 conn=wye bus1=bussec3_3.3 kv=0.23999999999999999 model=1 kw=6.9997699999999998 kvar=2.47492 vminpu=0.7 vmaxpu=1.4 duty=load3_3
new object=load.load3_4 phases=1 conn=wye bus1=bussec3_4.3 kv=0.23999999999999999 model=1 kw=6.9995599999999998 kvar=1.50495 vminpu=0.7 vmaxpu=1.4 duty=load3_4
new object=load.load3_5 phases=1 conn=wye bus1=bussec3_5.3 kv=0.23999999999999999 model=1 kw=6.9996700000000001 kvar=0.75226899999999997 vminpu=0.7 vmaxpu=1.4 duty=load3_5
new object=load.load4_5 phases=1 conn=wye bus1=bussec4_5.1 kv=0.23999999999999999 model=1 kw=6.9992599999999996 kvar=1.94594 vminpu=0.7 vmaxpu=1.4 duty=load4_5
new object=load.load4_4 phases=1 conn=wye bus1=bussec4_4.1 kv=0.23999999999999999 model=1 kw=6.9986699999999997 kvar=2.0216799999999999 vminpu=0.7 vmaxpu=1.4 duty=load4_4
new object=load.load4_3 phases=1 conn=wye bus1=bussec4_3.1 kv=0.23999999999999999 model=1 kw=6.9968700000000004 kvar=1.5712999999999999 vminpu=0.7 vmaxpu=1.4 duty=load4_3
new object=load.load4_2 phases=1 conn=wye bus1=bussec4_2.1 kv=0.23999999999999999 model=1 kw=6.9998899999999997 kvar=2.6514600000000002 vminpu=0.7 vmaxpu=1.4 duty=load4_2
new object=load.load4_1 phases=1 conn=wye bus1=bussec4_1.1 kv=0.23999999999999999 model=1 kw=6.9997499999999997 kvar=2.8615400000000002 vminpu=0.7 vmaxpu=1.4 duty=load4_1
new object=load.load5_4 phases=1 conn=wye bus1=bussec5_4.3 kv=0.23999999999999999 model=1 kw=9.9995999999999992 kvar=2.46455 vminpu=0.7 vmaxpu=1.4 duty=load5_4
new object=load.load5_3 phases=1 conn=wye bus1=bussec5_3.3 kv=0.23999999999999999 model=1 kw=9.9990900000000007 kvar=1.43201 vminpu=0.7 vmaxpu=1.4 duty=load5_3
new object=load.load5_2 phases=1 conn=wye bus1=bussec5_2.3 kv=0.23999999999999999 model=1 kw=9.9999199999999995 kvar=4.1113299999999997 vminpu=0.7 vmaxpu=1.4 duty=load5_2
new object=load.load5_1 phases=1 conn=wye bus1=bussec5_1.3 kv=0.23999999999999999 model=1 kw=9.9980399999999996 kvar=1.74519 vminpu=0.7 vmaxpu=1.4 duty=load5_1
new object=load.load6_4 phases=1 conn=wye bus1=bussec6_4.3 kv=0.23999999999999999 model=1 kw=9.9996399999999994 kvar=1.69476 vminpu=0.7 vmaxpu=1.4 duty=load6_4
new object=load.load6_3 phases=1 conn=wye bus1=bussec6_3.3 kv=0.23999999999999999 model=1 kw=9.9995600000000007 kvar=1.8328899999999999 vminpu=0.7 vmaxpu=1.4 duty=load6_3
new object=load.load6_2 phases=1 conn=wye bus1=bussec6_2.3 kv=0.23999999999999999 model=1 kw=9.9987200000000005 kvar=3.9084300000000001 vminpu=0.7 vmaxpu=1.4 duty=load6_2
new object=load.load6_1 phases=1 conn=wye bus1=bussec6_1.3 kv=0.23999999999999999 model=1 kw=9.9991699999999994 kvar=2.8207 vminpu=0.7 vmaxpu=1.4 duty=load6_1
new object=load.load7_2 phases=1 conn=wye bus1=bussec7_2.1 kv=0.23999999999999999 model=1 kw=9.9995700000000003 kvar=2.0579100000000001 vminpu=0.7 vmaxpu=1.4 duty=load7_2
new object=load.load7_1 phases=1 conn=wye bus1=bussec7_1.1 kv=0.23999999999999999 model=1 kw=9.9996899999999993 kvar=3.30335 vminpu=0.7 vmaxpu=1.4 duty=load7_1
new object=load.load7_4 phases=1 conn=wye bus1=bussec7_4.1 kv=0.23999999999999999 model=1 kw=9.9997000000000007 kvar=1.52956 vminpu=0.7 vmaxpu=1.4 duty=load7_4
new object=load.load7_3 phases=1 conn=wye bus1=bussec7_3.1 kv=0.23999999999999999 model=1 kw=9.9997699999999998 kvar=2.0360100000000001 vminpu=0.7 vmaxpu=1.4 duty=load7_3
new object=load.load8_1 phases=1 conn=wye bus1=bussec8_1.2 kv=0.23999999999999999 model=1 kw=9.9999199999999995 kvar=4.6074099999999998 vminpu=0.7 vmaxpu=1.4 duty=load8_1
new object=load.load8_4 phases=1 conn=wye bus1=bussec8_4.2 kv=0.23999999999999999 model=1 kw=9.9987899999999996 kvar=4.0914299999999999 vminpu=0.7 vmaxpu=1.4 duty=load8_4
new object=load.load8_3 phases=1 conn=wye bus1=bussec8_3.2 kv=0.23999999999999999 model=1 kw=9.9977400000000003 kvar=2.7204999999999999 vminpu=0.7 vmaxpu=1.4 duty=load8_3
new object=load.load8_2 phases=1 conn=wye bus1=bussec8_2.2 kv=0.23999999999999999 model=1 kw=9.9986599999999992 kvar=4.5725199999999999 vminpu=0.7 vmaxpu=1.4 duty=load8_2
new object=load.load9_2 phases=1 conn=wye bus1=bussec9_2.3 kv=0.23999999999999999 model=1 kw=19.999600000000001 kvar=8.8442600000000002 vminpu=0.7 vmaxpu=1.4 duty=load9_2
new object=load.load9_1 phases=1 conn=wye bus1=bussec9_1.3 kv=0.23999999999999999 model=1 kw=19.999500000000001 kvar=6.59246 vminpu=0.7 vmaxpu=1.4 duty=load9_1
new object=load.load10_1 phases=1 conn=wye bus1=bussec10_1.2 kv=0.23999999999999999 model=1 kw=19.999300000000002 kvar=8.4099699999999995 vminpu=0.7 vmaxpu=1.4 duty=load10_1
new object=load.load10_2 phases=1 conn=wye bus1=bussec10_2.2 kv=0.23999999999999999 model=1 kw=19.997900000000001 kvar=7.0495599999999996 vminpu=0.7 vmaxpu=1.4 duty=load10_2
new object=load.load11_2 kv=0.23999999999999999 phases=1 bus1=bussec11_2.2 model=1 conn=wye kw=6.9985099999999996 kvar=2.56115 vminpu=0.6 vmaxpu=2.0 duty=load1_1
new object=load.load11_1 kv=0.23999999999999999 phases=1 bus1=bussec11_1.2 model=1 conn=wye kw=6.9986499999999996 kvar=1.85745 vminpu=0.6 vmaxpu=2.0 duty=load1_2
new object=load.load12_8 kv=0.23999999999999999 phases=1 bus1=busload8.1 vminpu=0.6 vmaxpu=2.0 model=1 conn=wye kw=6.9998899999999997 kvar=2.6514600000000002 duty=load4_2
new object=load.load12_7 kv=0.23999999999999999 phases=1 bus1=busload7.1 vminpu=0.6 vmaxpu=2.0 model=1 conn=wye kw=6.9997499999999997 kvar=2.8615400000000002 duty=load4_1
new object=load.load12_6 kv=0.23999999999999999 phases=1 bus1=busload6.1 vminpu=0.6 vmaxpu=2.0 model=1 conn=wye kw=6.9997699999999998 kvar=2.47492 duty=load3_3
new object=load.load12_5 kv=0.23999999999999999 phases=1 bus1=busload5.1 vminpu=0.6 vmaxpu=2.0 model=1 conn=wye kw=6.9995399999999997 kvar=2.5578400000000001 duty=load3_2
new object=load.load12_4 kv=0.23999999999999999 phases=1 bus1=busload4.1 vminpu=0.6 vmaxpu=2.0 model=1 conn=wye kw=6.9995099999999999 kvar=1.9220999999999999 duty=load3_1
new object=load.load12_3 kv=0.23999999999999999 phases=1 bus1=busload3.1 vminpu=0.6 vmaxpu=2.0 model=1 conn=wye kw=6.9997600000000002 kvar=3.0417000000000001 duty=load1_5
new object=load.load12_2 kv=0.23999999999999999 phases=1 bus1=busload2.1 vminpu=0.6 vmaxpu=2.0 model=1 conn=wye kw=6.9993499999999997 kvar=2.22336 duty=load1_4
new object=load.load12_1 kv=0.23999999999999999 phases=1 bus1=busload1.1 vminpu=0.6 vmaxpu=2.0 model=1 conn=wye kw=6.9998300000000002 kvar=1.52061 duty=load1_3


!!!energymeter.dss
new object=energymeter.feeder element=line.mdv_sub_1_hsb terminal=1


!!!buscoords.dss
makebuslist
setbusxy bus=bussource x=0 y=0.5
setbusxy bus=mdv_sub_1_hsb x=0.040000000000000001 y=0.5
setbusxy bus=feederheadbus x=0.050000000000000003 y=0.5
setbusxy bus=busprim1 x=0.10000000000000001 y=0.5
setbusxy bus=busprim2 x=0.20000000000000001 y=0.5
setbusxy bus=busprim3 x=0.29999999999999999 y=0.5
setbusxy bus=busprim4 x=0.40000000000000002 y=0.5
setbusxy bus=busprim5 x=0.5 y=0.5
setbusxy bus=busprim6 x=0.59999999999999998 y=0.5
setbusxy bus=busprim7 x=0.69999999999999996 y=0.5
setbusxy bus=busprim8 x=0.80000000000000004 y=0.5
setbusxy bus=busprim9 x=0.90000000000000002 y=0.5
setbusxy bus=busprim10 x=1 y=0.5
setbusxy bus=busprim11 x=1.1000000000000001 y=0.5
setbusxy bus=busprim12 x=1.2 y=0.5
setbusxy bus=bustrafo1lv x=0.10000000000000001 y=0.5
setbusxy bus=bussec1_1 x=0.14999999999999999 y=0.52500000000000002
setbusxy bus=bussec1_2 x=0.14999999999999999 y=0.54000000000000004
setbusxy bus=bussec1_3 x=0.14999999999999999 y=0.56000000000000005
setbusxy bus=bussec1_4 x=0.050000000000000003 y=0.54000000000000004
setbusxy bus=bussec1_5 x=0.050000000000000003 y=0.52500000000000002
setbusxy bus=bustrafo2lv x=0.20000000000000001 y=0.5
setbusxy bus=bussec2_1 x=0.20000000000000001 y=0.45000000000000001
setbusxy bus=bustrafo3lv x=0.29999999999999999 y=0.5
setbusxy bus=bussec3_1 x=0.29999999999999999 y=0.52000000000000002
setbusxy bus=bussec3_2 x=0.29999999999999999 y=0.54000000000000004
setbusxy bus=bussec3_3 x=0.29999999999999999 y=0.56000000000000005
setbusxy bus=bussec3_4 x=0.29999999999999999 y=0.57999999999999996
setbusxy bus=bussec3_5 x=0.29999999999999999 y=0.59999999999999998
setbusxy bus=bustrafo4lv x=0.40000000000000002 y=0.5
setbusxy bus=bussec4_0 x=0.40000000000000002 y=0.46999999999999997
setbusxy bus=bussec4_1 x=0.45000000000000001 y=0.47999999999999998
setbusxy bus=bussec4_2 x=0.45000000000000001 y=0.46000000000000002
setbusxy bus=bussec4_3 x=0.34999999999999998 y=0.47999999999999998
setbusxy bus=bussec4_4 x=0.34999999999999998 y=0.44
setbusxy bus=bussec4_5 x=0.34999999999999998 y=0.46000000000000002
setbusxy bus=bustrafo5lv x=0.5 y=0.5
setbusxy bus=bussec5_0 x=0.5 y=0.59999999999999998
setbusxy bus=bussec5_1 x=0.45000000000000001 y=0.59999999999999998
setbusxy bus=bussec5_2 x=0.55000000000000004 y=0.59999999999999998
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

!!!busvoltagebases.dss
set voltagebases=(46,12.470000000000001,0.41569219000000002)
calcvoltagebases


!powerflow code
set maxiterations=1000
set maxcontroliter=1000
calcv
solve
show quantity=voltage
